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/batch
! ANSYS input file written by Workbench version 2023 R2
! File used for geometry attach: C:\Users\dell\OneDrive - Tribhuvan University\Documents\8th sem\Finite Element Method\MATLAB\Assignment\Assignment_2_10.SLDPRT
/title,2-10--Static Structural (B5)
/COM,/COM,     ANSYSMotion, 2023.2
/com,--- Data in consistent MKS units. See Solving Units in the help system for more information.
/units,MKS
/prep7
! Turn off shape checking because checks already performed inside WB mesher.
! See help system for more information.
SHPP,OFF,,NOWARN
etcon,set             ! allow ANSYS to choose best KEYOP's for 180x elements, resets any applicable keyopt to MAPDL defaults
/com,*********** Nodes for the whole assembly ***********
nblock,3,,18849
(1i9,3e20.9e3)
        1    -1.308460355E-01    -5.241817017E-05     5.000000000E-03
        2     1.308042565E-01     8.988000137E-05     5.000000000E-03
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-1
/com,*********** Elements for Body 1 "Assignment_2_10" ***********
et,1,186
keyo,1,2,1          ! set full integration on SOLID186
eblock,19,solid,,2880
(19i9)
        1        1        1        1        0        0        0        0       20        0        1        1      876      875       15     2556     1681     1682     2542
     4810     8613     4876     4809    11303    11302    11306    12782     4811     8618     8614     4878
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-1
/com,*********** Send User Defined Coordinate System(s) ***********
csys,0
toffst,273.15,  ! Temperature offset from absolute zero
/com,*********** Set Reference Temperature ***********
tref,22.
/com,*********** Send Materials ***********
MP,DENS,1,2770,	! kg m^-3
MP,ALPX,1,2.3e-05,	! C^-1
MP,C,1,875,	! J kg^-1 C^-1
MPTEMP,,,,,,,,
MPTEMP,1,-100
MPTEMP,2,0
MPTEMP,3,100
MPTEMP,4,200
MPDATA,KXX,1, ,114,144,165,175,	! W m^-1 C^-1
MPTEMP,,,,,,,,
MPTEMP,,,,,,,,
MPTEMP,1,0
MPTEMP,2,20
MPTEMP,3,100
MPDATA,RSVX,1, ,2.43e-08,2.67e-08,3.63e-08,	! kg m^3 A^-2 s^-3
MPTEMP,,,,,,,,
MP,EX,1,71000000000,	! Pa
MP,NUXY,1,0.33,
MP,MURX,1,1,

!************************* Model Summary ********************
!Assignment_2_10,	Aluminum Alloy 2,	matid,	1
!************************* End Model Summary ********************
/com,*********** Fixed Supports ***********
CMBLOCK,_FIXEDSU,NODE,      197
(8i10)
      4030      4031      4032      4033      4034      4035      4036      4037
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cmsel,s,_FIXEDSU
d,all,all
nsel,all
/com,*********** Define Force Without Surface Effect Elements "Force" ***********
local,12,0,0.,0.,0.,0.,0.,0.
csys,0
CMBLOCK,_CM32_3 ,ELEM,       24
(8i10)
      2676      2677      2679      2681      2683      2685      2687      2689
      2691      2693      2695      2697      2699      2701      2703      2705
      2707      2709      2711      2713      2715      2717      2719      2721

CMBLOCK,_CM32_4 ,ELEM,       24
(8i10)
      2675      2678      2680      2682      2684      2686      2688      2690
      2692      2694      2696      2698      2700      2702      2704      2706
      2708      2710      2712      2714      2716      2718      2720      2722


*DIM,_loadvari32x,TABLE,2,1,1,TIME
! Time values
*TAXIS,_loadvari32x(1),1,0.,1.
! Load values
_loadvari32x(1,1,1) = 166666666.666679
_loadvari32x(2,1,1) = 166666666.666679


*DIM,_loadvari32y,TABLE,2,1,1,TIME
! Time values
*TAXIS,_loadvari32y(1),1,0.,1.
! Load values
_loadvari32y(1,1,1) = 0.
_loadvari32y(2,1,1) = 0.


*DIM,_loadvari32z,TABLE,2,1,1,TIME
! Time values
*TAXIS,_loadvari32z(1),1,0.,1.
! Load values
_loadvari32z(1,1,1) = 0.
_loadvari32z(2,1,1) = 0.


fini
/com,****************************************************************************
/com,*************************    SOLUTION       ********************************
/com,****************************************************************************
/solu
antype,0                   ! static analysis
_thickRatio=  0     ! Ratio of thick parts in the model
eqsl,sparse,,,,,1
cntr,print,1               ! print out contact info and also make no initial contact an error
cncheck,dmp		!	Enable program controlled contact splitting for distributed memory parallel run
dmpoption,emat,no             ! Don't combine emat file for DANSYS
dmpoption,esav,no             ! Don't combine esav file for DANSYS
nldiag,cont,iter           ! print out contact info each equilibrium iteration
rescontrol,,none                 ! Do not keep any restart files
/com,****************************************************
/com,******************* SOLVE FOR LS 1 OF 1 ****************
/com,*********** Set Force Without Surface Effect Elements "Force" ***********
sfco,1,0,12,,,,,1		! set and send X component tables
sfe,_CM32_3,3,pres,1,%_loadvari32x%
sfe,_CM32_4,4,pres,1,%_loadvari32x%
nsel,all
esel,all
sfco,none		! resets the sfcontrol
nsub,1,1,1
time,1.
outres,erase
outres,all,none
outres,nsol,all,
outres,rsol,all
outres,eangl,all
outres,etmp,all
outres,veng,all
outres,strs,all,
outres,epel,all,
outres,eppl,all,
outres,cont,all,
! *********** WB SOLVE COMMAND ***********
! check interactive state
*get,ANSINTER_,active,,int
*if,ANSINTER_,ne,0,then
/eof
*endif
solve
/com *************** Write FE CONNECTORS *********
CEWRITE,file,ce,,INTE
/com,****************************************************
/com,*************** FINISHED SOLVE FOR LS 1 *************
*get,_NSOLTHREADS,active,0,ntfs
*get,_NSOLPROCESSES,active,0,npfs
/post1
fini
